# OpenSim document version 30516
MarkerSet:
  Marker Oglobal: socket_parent_frame_connectee_name=/ground (0 0 0)
  Marker Xglobal: socket_parent_frame_connectee_name=/ground (1 0 0)
  Marker Yglobal: socket_parent_frame_connectee_name=/ground (0 1 0)
  Marker Zglobal: socket_parent_frame_connectee_name=/ground (0 0 1)
  Marker Sacrum: socket_parent_frame_connectee_name=/bodyset/pelvis (-0.18 0.01 0)
  Marker Sacral: socket_parent_frame_connectee_name=/bodyset/pelvis (-0.18 0.01 0)
  Marker S2: socket_parent_frame_connectee_name=/bodyset/pelvis (-0.18 0.01 0)
  Marker SACR: socket_parent_frame_connectee_name=/bodyset/pelvis (-0.18 0.01 0)
  Marker VSAC: socket_parent_frame_connectee_name=/bodyset/pelvis (-0.18 0.01 0)
  Marker R.ASIS: socket_parent_frame_connectee_name=/bodyset/pelvis (0.02 0.01 0.128)
  Marker R.Asis: socket_parent_frame_connectee_name=/bodyset/pelvis (0.02 0.01 0.128)
  Marker RASIS: socket_parent_frame_connectee_name=/bodyset/pelvis (0.02 0.01 0.128)
  Marker RASI: socket_parent_frame_connectee_name=/bodyset/pelvis (0.02 0.01 0.128)
  Marker R.Iliac: socket_parent_frame_connectee_name=/bodyset/pelvis (-0.08 0.06 0.15)
  Marker R.PSIS: socket_parent_frame_connectee_name=/bodyset/pelvis (-0.18 0.01 0.055)
  Marker R.Psis: socket_parent_frame_connectee_name=/bodyset/pelvis (-0.18 0.01 0.055)
  Marker RPSIS: socket_parent_frame_connectee_name=/bodyset/pelvis (-0.18 0.01 0.055)
  Marker RPSI: socket_parent_frame_connectee_name=/bodyset/pelvis (-0.18 0.01 0.055)
  Marker R.Trochanter: socket_parent_frame_connectee_name=/bodyset/pelvis (-0.1 -0.11 0.16)
  Marker R.GreatTroch: socket_parent_frame_connectee_name=/bodyset/pelvis (-0.1 -0.11 0.16)
  Marker R.GTR: socket_parent_frame_connectee_name=/bodyset/pelvis (-0.1 -0.11 0.16)
  Marker L.ASIS: socket_parent_frame_connectee_name=/bodyset/pelvis (0.02 0.01 -0.128)
  Marker L.Asis: socket_parent_frame_connectee_name=/bodyset/pelvis (0.02 0.01 -0.128)
  Marker LASIS: socket_parent_frame_connectee_name=/bodyset/pelvis (0.02 0.01 -0.128)
  Marker LASI: socket_parent_frame_connectee_name=/bodyset/pelvis (0.02 0.01 -0.128)
  Marker L.Iliac: socket_parent_frame_connectee_name=/bodyset/pelvis (-0.08 0.06 -0.15)
  Marker L.PSIS: socket_parent_frame_connectee_name=/bodyset/pelvis (-0.18 0.01 -0.055)
  Marker L.Psis: socket_parent_frame_connectee_name=/bodyset/pelvis (-0.18 0.01 -0.055)
  Marker LPSIS: socket_parent_frame_connectee_name=/bodyset/pelvis (-0.18 0.01 -0.055)
  Marker LPSI: socket_parent_frame_connectee_name=/bodyset/pelvis (-0.18 0.01 -0.055)
  Marker L.Trochanter: socket_parent_frame_connectee_name=/bodyset/pelvis (-0.1 -0.11 -0.16)
  Marker L.GreatTroch: socket_parent_frame_connectee_name=/bodyset/pelvis (-0.1 -0.11 -0.16)
  Marker L.GTR: socket_parent_frame_connectee_name=/bodyset/pelvis (-0.1 -0.11 -0.16)
  Marker Offset: socket_parent_frame_connectee_name=/bodyset/torso (-0.18 0.22 0)
  Marker Sternum: socket_parent_frame_connectee_name=/bodyset/torso (0.035 0.41 0)
  Marker Xiphoid: socket_parent_frame_connectee_name=/bodyset/torso (0.035 0.41 0)
  Marker T10: socket_parent_frame_connectee_name=/bodyset/torso (0 0 0)
  Marker CLAV: socket_parent_frame_connectee_name=/bodyset/torso (0.035 0.45 0)
  Marker R.Clavicle: socket_parent_frame_connectee_name=/bodyset/torso (0.035 0.45 0.025)
  Marker L.Clavicle: socket_parent_frame_connectee_name=/bodyset/torso (0.035 0.45 -0.025)
  Marker STRN: socket_parent_frame_connectee_name=/bodyset/torso (0.18 0.22 0)
  Marker RBAK: socket_parent_frame_connectee_name=/bodyset/torso (0.18 0.22 0)
  Marker Thoracic: socket_parent_frame_connectee_name=/bodyset/torso (0.18 0.22 0)
  Marker R.Scapula: socket_parent_frame_connectee_name=/bodyset/torso (-0.12 -0.1 -0.08)
  Marker R.Scapula.Top: socket_parent_frame_connectee_name=/bodyset/torso (0 0 0)
  Marker R.Scapula.Bottom: socket_parent_frame_connectee_name=/bodyset/torso (0 0 0)
  Marker R.Angulus.Acromialis: socket_parent_frame_connectee_name=/bodyset/torso (-0.085 0.435 0.184)
  Marker R.Trigonum.Spinae: socket_parent_frame_connectee_name=/bodyset/torso (-0.126 0.4 0.119)
  Marker R.Angulus.Inferior: socket_parent_frame_connectee_name=/bodyset/torso (-0.135 0.27 0.135)
  Marker C7.Spinous.Process: socket_parent_frame_connectee_name=/bodyset/torso (-0.08 0.455 0)
  Marker Lumbar: socket_parent_frame_connectee_name=/bodyset/torso (-0.08 0.455 0)
  Marker Neck: socket_parent_frame_connectee_name=/bodyset/torso (-0.08 0.455 0)
  Marker L.Scapula: socket_parent_frame_connectee_name=/bodyset/torso (-0.12 -0.1 0.08)
  Marker L.Scapula.Top: socket_parent_frame_connectee_name=/bodyset/torso (0 0 0)
  Marker L.Scapula.Bottom: socket_parent_frame_connectee_name=/bodyset/torso (0 0 0)
  Marker L.Angulus.Acromialis: socket_parent_frame_connectee_name=/bodyset/torso (-0.085 0.435 -0.184)
  Marker L.Trigonum.Spinae: socket_parent_frame_connectee_name=/bodyset/torso (-0.126 0.4 -0.119)
  Marker L.Angulus.Inferior: socket_parent_frame_connectee_name=/bodyset/torso (-0.135 0.27 -0.135)
  Marker R.Shoulder: socket_parent_frame_connectee_name=/bodyset/torso (-0.0488 0.45065 0.165)
  Marker R.ShoulderCenter: socket_parent_frame_connectee_name=/bodyset/torso (-0.0488 0.44065 0.165)
  Marker R.ShoulderAnterior: socket_parent_frame_connectee_name=/bodyset/torso (-0.0388 0.45065 0.165)
  Marker R.ShoulderPosterior: socket_parent_frame_connectee_name=/bodyset/torso (-0.0588 0.45065 0.165)
  Marker RSHO: socket_parent_frame_connectee_name=/bodyset/torso (-0.0488 0.45065 0.165)
  Marker L.Shoulder: socket_parent_frame_connectee_name=/bodyset/torso (-0.0488 0.45065 -0.165)
  Marker L.ShoulderAnterior: socket_parent_frame_connectee_name=/bodyset/torso (-0.0388 0.45065 -0.165)
  Marker L.ShoulderCenter: socket_parent_frame_connectee_name=/bodyset/torso (-0.0488 0.45065 -0.165)
  Marker L.ShoulderPosterior: socket_parent_frame_connectee_name=/bodyset/torso (-0.0588 0.45065 -0.165)
  Marker LSHO: socket_parent_frame_connectee_name=/bodyset/torso (-0.0588 0.47065 -0.165)
  Marker Rear.Head: socket_parent_frame_connectee_name=/bodyset/neckhead (-0.07166 0.2359 0)
  Marker Head.Rear: socket_parent_frame_connectee_name=/bodyset/neckhead (-0.07166 0.2359 0)
  Marker RearHead: socket_parent_frame_connectee_name=/bodyset/neckhead (-0.07166 0.2359 0)
  Marker HeadRear: socket_parent_frame_connectee_name=/bodyset/neckhead (-0.07166 0.2359 0)
  Marker Front.Head: socket_parent_frame_connectee_name=/bodyset/neckhead (0.1183 0.2359 0)
  Marker Head.Front: socket_parent_frame_connectee_name=/bodyset/neckhead (0.1183 0.2359 0)
  Marker FrontHead: socket_parent_frame_connectee_name=/bodyset/neckhead (0.1183 0.2359 0)
  Marker HeadFront: socket_parent_frame_connectee_name=/bodyset/neckhead (0.1183 0.2359 0)
  Marker Top.Head: socket_parent_frame_connectee_name=/bodyset/neckhead (0.0233 0.2959 0)
  Marker Head.Top: socket_parent_frame_connectee_name=/bodyset/neckhead (0.0233 0.2959 0)
  Marker TopHead: socket_parent_frame_connectee_name=/bodyset/neckhead (0.0233 0.2959 0)
  Marker HeadTop: socket_parent_frame_connectee_name=/bodyset/neckhead (0.0233 0.2959 0)
  Marker R.Ear: socket_parent_frame_connectee_name=/bodyset/neckhead (-0.07166 0.2359 0)
  Marker L.Ear: socket_parent_frame_connectee_name=/bodyset/neckhead (-0.07166 0.2359 0)
  Marker RBHD: socket_parent_frame_connectee_name=/bodyset/neckhead (-0.07166 0.2359 0)
  Marker RFHD: socket_parent_frame_connectee_name=/bodyset/neckhead (-0.07166 0.2359 0)
  Marker LBHD: socket_parent_frame_connectee_name=/bodyset/neckhead (-0.07166 0.2359 0)
  Marker LFHD: socket_parent_frame_connectee_name=/bodyset/neckhead (-0.07166 0.2359 0)
  Marker HEDO: socket_parent_frame_connectee_name=/bodyset/neckhead (-0.07166 0.2359 0)
  Marker HEDP: socket_parent_frame_connectee_name=/bodyset/neckhead (-0.07166 0.2359 0)
  Marker HEDA: socket_parent_frame_connectee_name=/bodyset/neckhead (-0.07166 0.2359 0)
  Marker HEDL: socket_parent_frame_connectee_name=/bodyset/neckhead (-0.07166 0.2359 0)
  Marker C7: socket_parent_frame_connectee_name=/bodyset/neckhead (0 0 0)
  Marker C7.Spinous.Process_0: socket_parent_frame_connectee_name=/bodyset/neckhead (0 0 0)
  Marker R.Bicep: socket_parent_frame_connectee_name=/bodyset/humerus_r (0.04 -0.15 0)
  Marker R.Biceps: socket_parent_frame_connectee_name=/bodyset/humerus_r (0.04 -0.15 0)
  Marker R.Tricep: socket_parent_frame_connectee_name=/bodyset/humerus_r (-0.04 -0.15 0)
  Marker R.Biceps.Lateral: socket_parent_frame_connectee_name=/bodyset/humerus_r (0.03 -0.15 0.02)
  Marker R.Humerus: socket_parent_frame_connectee_name=/bodyset/humerus_r (0 0 0)
  Marker R.ElbowCenter: socket_parent_frame_connectee_name=/bodyset/humerus_r (-0.01 -0.281 0)
  Marker R.Elbow: socket_parent_frame_connectee_name=/bodyset/humerus_r (-0.01 -0.281 0.04)
  Marker R.Elbow.Lateral: socket_parent_frame_connectee_name=/bodyset/humerus_r (-0.01 -0.281 0.04)
  Marker R.Elbow.Lat: socket_parent_frame_connectee_name=/bodyset/humerus_r (-0.01 -0.281 0.04)
  Marker RELB: socket_parent_frame_connectee_name=/bodyset/humerus_r (-0.01 -0.281 0.04)
  Marker R.Elbow.Medial: socket_parent_frame_connectee_name=/bodyset/humerus_r (0 -0.281 -0.04)
  Marker R.ElbowMedial: socket_parent_frame_connectee_name=/bodyset/humerus_r (0 -0.281 -0.04)
  Marker R.Elbow.Med: socket_parent_frame_connectee_name=/bodyset/humerus_r (0 -0.281 -0.04)
  Marker R.MElbow: socket_parent_frame_connectee_name=/bodyset/humerus_r (0 -0.281 -0.04)
  Marker R.Melb: socket_parent_frame_connectee_name=/bodyset/humerus_r (0 -0.281 -0.04)
  Marker R.Forearm: socket_parent_frame_connectee_name=/bodyset/ulna_r (0 -0.15 0)
  Marker R.Wrist: socket_parent_frame_connectee_name=/bodyset/radius_r (-0.025 -0.245 0.006)
  Marker R.WristCenter: socket_parent_frame_connectee_name=/bodyset/radius_r (-0.025 -0.245 0.006)
  Marker R.Wrist.Lateral: socket_parent_frame_connectee_name=/bodyset/radius_r (-0.025 -0.245 0.006)
  Marker R.Wrist.Lat: socket_parent_frame_connectee_name=/bodyset/radius_r (-0.025 -0.245 0.006)
  Marker R.Wrist.Medial: socket_parent_frame_connectee_name=/bodyset/radius_r (0.035 -0.245 0)
  Marker R.Wrist.Med: socket_parent_frame_connectee_name=/bodyset/radius_r (0.035 -0.245 0)
  Marker R.Ulna: socket_parent_frame_connectee_name=/bodyset/radius_r (0 -0.245 -0.03)
  Marker R.Radius: socket_parent_frame_connectee_name=/bodyset/radius_r (0 -0.245 0.04)
  Marker RWRI: socket_parent_frame_connectee_name=/bodyset/radius_r (-0.025 -0.245 0.006)
  Marker RWRA: socket_parent_frame_connectee_name=/bodyset/radius_r (-0.025 -0.245 0.006)
  Marker RWRB: socket_parent_frame_connectee_name=/bodyset/radius_r (0.035 -0.245 0)
  Marker R.Hand: socket_parent_frame_connectee_name=/bodyset/hand_r (-0.03 -0.05 0)
  Marker L.Bicep: socket_parent_frame_connectee_name=/bodyset/humerus_l (0.04 -0.15 0)
  Marker L.Biceps: socket_parent_frame_connectee_name=/bodyset/humerus_l (0.04 -0.15 0)
  Marker L.Tricep: socket_parent_frame_connectee_name=/bodyset/humerus_l (-0.04 -0.15 0)
  Marker L.Biceps.Lateral: socket_parent_frame_connectee_name=/bodyset/humerus_l (0.03 -0.15 -0.02)
  Marker L.Humerus: socket_parent_frame_connectee_name=/bodyset/humerus_l (0 0 0)
  Marker L.ElbowCenter: socket_parent_frame_connectee_name=/bodyset/humerus_l (0.01 -0.281 0)
  Marker L.Elbow: socket_parent_frame_connectee_name=/bodyset/humerus_l (0.01 -0.281 -0.04)
  Marker L.Elbow.Lateral: socket_parent_frame_connectee_name=/bodyset/humerus_l (0.01 -0.281 -0.04)
  Marker L.ElbowLateral: socket_parent_frame_connectee_name=/bodyset/humerus_l (0.01 -0.281 -0.04)
  Marker L.Elbow.Lat: socket_parent_frame_connectee_name=/bodyset/humerus_l (0.01 -0.281 -0.04)
  Marker LELB: socket_parent_frame_connectee_name=/bodyset/humerus_l (0.01 -0.281 -0.04)
  Marker L.Elbow.Medial: socket_parent_frame_connectee_name=/bodyset/humerus_l (-0.02 -0.281 0.04)
  Marker L.ElbowMedial: socket_parent_frame_connectee_name=/bodyset/humerus_l (-0.02 -0.281 0.04)
  Marker L.Elbow.Med: socket_parent_frame_connectee_name=/bodyset/humerus_l (-0.02 -0.281 0.04)
  Marker L.MElbow: socket_parent_frame_connectee_name=/bodyset/humerus_l (-0.02 -0.281 0.04)
  Marker L.Melb: socket_parent_frame_connectee_name=/bodyset/humerus_l (-0.02 -0.281 0.04)
  Marker L.Forearm: socket_parent_frame_connectee_name=/bodyset/ulna_l (0 -0.15 0)
  Marker L.Wrist: socket_parent_frame_connectee_name=/bodyset/radius_l (-0.025 -0.245 -0.006)
  Marker L.WristCenter: socket_parent_frame_connectee_name=/bodyset/radius_l (-0.025 -0.245 -0.006)
  Marker L.Wrist.Lateral: socket_parent_frame_connectee_name=/bodyset/radius_l (-0.025 -0.245 -0.006)
  Marker L.Wrist.Lat: socket_parent_frame_connectee_name=/bodyset/radius_l (-0.025 -0.245 -0.006)
  Marker L.Wrist.Medial: socket_parent_frame_connectee_name=/bodyset/radius_l (0.035 -0.245 0)
  Marker L.Wrist.Med: socket_parent_frame_connectee_name=/bodyset/radius_l (0.035 -0.245 0)
  Marker L.Ulna: socket_parent_frame_connectee_name=/bodyset/radius_l (0 -0.245 0.03)
  Marker L.Radius: socket_parent_frame_connectee_name=/bodyset/radius_l (0 -0.245 -0.04)
  Marker LWRI: socket_parent_frame_connectee_name=/bodyset/radius_l (-0.025 -0.245 -0.006)
  Marker LWRA: socket_parent_frame_connectee_name=/bodyset/radius_l (-0.025 -0.245 -0.006)
  Marker LWRB: socket_parent_frame_connectee_name=/bodyset/radius_l (0.025 -0.245 0)
  Marker L.Hand: socket_parent_frame_connectee_name=/bodyset/hand_l (-0.03 -0.05 0)
  Marker RKneeCenter: socket_parent_frame_connectee_name=/bodyset/femur_r (0 -0.404 0)
  Marker R.Knee: socket_parent_frame_connectee_name=/bodyset/femur_r (0 -0.404 0.05)
  Marker R.Knee.Lateral: socket_parent_frame_connectee_name=/bodyset/femur_r (0 -0.404 0.05)
  Marker R.Knee.Lat: socket_parent_frame_connectee_name=/bodyset/femur_r (0 -0.404 0.05)
  Marker RKNE: socket_parent_frame_connectee_name=/bodyset/femur_r (0 -0.404 0.05)
  Marker R.Knee.Medial: socket_parent_frame_connectee_name=/bodyset/femur_r (0 -0.404 -0.05)
  Marker R.Knee.Med: socket_parent_frame_connectee_name=/bodyset/femur_r (0 -0.404 -0.05)
  Marker R.MKnee: socket_parent_frame_connectee_name=/bodyset/femur_r (0 -0.404 -0.05)
  Marker R.Mkn: socket_parent_frame_connectee_name=/bodyset/femur_r (0 -0.404 -0.05)
  Marker R.Thigh: socket_parent_frame_connectee_name=/bodyset/femur_r (0.0179 -0.224 0.1147)
  Marker R.Thigh.Superior: socket_parent_frame_connectee_name=/bodyset/femur_r (0.0179 -0.224 0.1147)
  Marker R.Thigh.Inferior: socket_parent_frame_connectee_name=/bodyset/femur_r (0.0179 -0.224 0.1147)
  Marker R.Thigh.Lateral: socket_parent_frame_connectee_name=/bodyset/femur_r (0.0179 -0.224 0.1147)
  Marker R.Thigh.Lateral.Superior: socket_parent_frame_connectee_name=/bodyset/femur_r (0.0179 -0.224 0.1147)
  Marker R.Thigh.Upper: socket_parent_frame_connectee_name=/bodyset/femur_r (0.0179 -0.264 0.0647)
  Marker R.Thigh.Lateral.Inferior: socket_parent_frame_connectee_name=/bodyset/femur_r (0.0179 -0.264 0.0647)
  Marker R.Thigh.Front: socket_parent_frame_connectee_name=/bodyset/femur_r (0.08 -0.324 0.0047)
  Marker R.Thigh.Medial.Inferior: socket_parent_frame_connectee_name=/bodyset/femur_r (0.08 -0.324 0.0047)
  Marker R.Thigh.Rear: socket_parent_frame_connectee_name=/bodyset/femur_r (-0.0479 -0.324 0.0047)
  Marker R.Thigh.Medial.Superior: socket_parent_frame_connectee_name=/bodyset/femur_r (0.0179 -0.224 0.1147)
  Marker R.TH1: socket_parent_frame_connectee_name=/bodyset/femur_r (0.0179 -0.224 0.1147)
  Marker R.TH2: socket_parent_frame_connectee_name=/bodyset/femur_r (0.0179 -0.264 0.0647)
  Marker R.TH3: socket_parent_frame_connectee_name=/bodyset/femur_r (0.0179 -0.264 0.0647)
  Marker R.TH4: socket_parent_frame_connectee_name=/bodyset/femur_r (0.08 -0.324 0.0047)
  Marker RHJC: socket_parent_frame_connectee_name=/bodyset/femur_r (0 0 0)
  Marker R_HJC: socket_parent_frame_connectee_name=/bodyset/femur_r (0 0 0)
  Marker R.AnkleCenter: socket_parent_frame_connectee_name=/bodyset/tibia_r (-0.005 -0.385 0)
  Marker RAnkleCenter: socket_parent_frame_connectee_name=/bodyset/tibia_r (-0.005 -0.385 0)
  Marker R.Ankle: socket_parent_frame_connectee_name=/bodyset/tibia_r (-0.005 -0.385 0.053)
  Marker R.Ankle.Lateral: socket_parent_frame_connectee_name=/bodyset/tibia_r (-0.005 -0.385 0.053)
  Marker R.Ankle.Lat: socket_parent_frame_connectee_name=/bodyset/tibia_r (-0.005 -0.385 0.053)
  Marker RANK: socket_parent_frame_connectee_name=/bodyset/tibia_r (-0.005 -0.41 0.053)
  Marker R.Ankle.Medial: socket_parent_frame_connectee_name=/bodyset/tibia_r (0.006 -0.385 -0.038)
  Marker R.AnkleMedial: socket_parent_frame_connectee_name=/bodyset/tibia_r (0.006 -0.385 -0.038)
  Marker RankleMedial: socket_parent_frame_connectee_name=/bodyset/tibia_r (0.006 -0.385 -0.038)
  Marker R.MAnkle: socket_parent_frame_connectee_name=/bodyset/tibia_r (0.006 -0.385 -0.038)
  Marker R.Man: socket_parent_frame_connectee_name=/bodyset/tibia_r (0.006 -0.385 -0.038)
  Marker R.Ankle.Med: socket_parent_frame_connectee_name=/bodyset/tibia_r (0.006 -0.385 -0.038)
  Marker R.TibTub: socket_parent_frame_connectee_name=/bodyset/tibia_r (0.05 -0.06 0.01)
  Marker R.Shank: socket_parent_frame_connectee_name=/bodyset/tibia_r (0.0104 -0.2322 0.0748)
  Marker R.Leg.Lateral.Inferior: socket_parent_frame_connectee_name=/bodyset/tibia_r (0.0125 -0.3196 0.06)
  Marker R.Shank.Superior: socket_parent_frame_connectee_name=/bodyset/tibia_r (0.0125 -0.3196 0.06)
  Marker R.Shank.Inferior: socket_parent_frame_connectee_name=/bodyset/tibia_r (0.0125 -0.3196 0.06)
  Marker R.Shank.Lateral: socket_parent_frame_connectee_name=/bodyset/tibia_r (0.0125 -0.3196 0.06)
  Marker R.Shank.Upper: socket_parent_frame_connectee_name=/bodyset/tibia_r (0.0125 -0.3196 0.06)
  Marker R.Leg.Medial.Inferior: socket_parent_frame_connectee_name=/bodyset/tibia_r (0.0125 -0.3196 0.06)
  Marker R.Shank.Front: socket_parent_frame_connectee_name=/bodyset/tibia_r (0.0425 -0.3596 0)
  Marker R.Leg.Superior: socket_parent_frame_connectee_name=/bodyset/tibia_r (0.0425 -0.3596 0)
  Marker R.Shank.Rear: socket_parent_frame_connectee_name=/bodyset/tibia_r (-0.0325 -0.3596 0)
  Marker RTIB: socket_parent_frame_connectee_name=/bodyset/tibia_r (0.0125 -0.3196 0.06)
  Marker R.SH1: socket_parent_frame_connectee_name=/bodyset/tibia_r (0.0104 -0.2322 0.0748)
  Marker R.SH2: socket_parent_frame_connectee_name=/bodyset/tibia_r (0.0125 -0.3196 0.06)
  Marker R.SH3: socket_parent_frame_connectee_name=/bodyset/tibia_r (0.0125 -0.3196 0.06)
  Marker R.SH4: socket_parent_frame_connectee_name=/bodyset/tibia_r (0.0125 -0.3196 0.06)
  Marker RTIB_0: socket_parent_frame_connectee_name=/bodyset/tibia_r (0.0125 -0.3196 0.06)
  Marker R.Patella: socket_parent_frame_connectee_name=/bodyset/patella_r (0.02 0.002610768 0)
  Marker R.Toe: socket_parent_frame_connectee_name=/bodyset/calcn_r (0.19 0.018 0)
  Marker R.ToeMedial: socket_parent_frame_connectee_name=/bodyset/calcn_r (0.19 0.018 0)
  Marker R.ToeLateral: socket_parent_frame_connectee_name=/bodyset/calcn_r (0.19 0.018 0)
  Marker RTOE: socket_parent_frame_connectee_name=/bodyset/calcn_r (0.19 0.018 0)
  Marker R.MedFoot: socket_parent_frame_connectee_name=/bodyset/calcn_r (0.11 0.018 -0.04)
  Marker R.Midfoot.Medial: socket_parent_frame_connectee_name=/bodyset/calcn_r (0.11 0.018 -0.04)
  Marker R.Midfoot.Lateral: socket_parent_frame_connectee_name=/bodyset/calcn_r (0.11 0.018 0.04)
  Marker R.Midfoot.Superior: socket_parent_frame_connectee_name=/bodyset/calcn_r (0.11 0.018 0.04)
  Marker R.Methead1: socket_parent_frame_connectee_name=/bodyset/calcn_r (0.2 0.005 -0.045)
  Marker R.MT1: socket_parent_frame_connectee_name=/bodyset/calcn_r (0.2 0.005 -0.045)
  Marker R.MT0: socket_parent_frame_connectee_name=/bodyset/calcn_r (0.2 0.005 -0.045)
  Marker R.Latfoot: socket_parent_frame_connectee_name=/bodyset/calcn_r (0.11 0.018 0.04)
  Marker R.MT5: socket_parent_frame_connectee_name=/bodyset/calcn_r (0.15 0.005 0.055)
  Marker R.Methead5: socket_parent_frame_connectee_name=/bodyset/calcn_r (0.15 0.005 0.055)
  Marker R.Heel: socket_parent_frame_connectee_name=/bodyset/calcn_r (-0.03 0.018 -0.01)
  Marker R.Hindfoot: socket_parent_frame_connectee_name=/bodyset/calcn_r (-0.03 0.018 -0.01)
  Marker RHEE: socket_parent_frame_connectee_name=/bodyset/calcn_r (-0.03 0.018 -0.01)
  Marker LKneeCenter: socket_parent_frame_connectee_name=/bodyset/femur_l (0 -0.404 0)
  Marker L.Knee: socket_parent_frame_connectee_name=/bodyset/femur_l (0 -0.404 -0.05)
  Marker L.Knee.Lateral: socket_parent_frame_connectee_name=/bodyset/femur_l (0 -0.404 -0.05)
  Marker L.Knee.Lat: socket_parent_frame_connectee_name=/bodyset/femur_l (0 -0.404 -0.05)
  Marker LKNE: socket_parent_frame_connectee_name=/bodyset/femur_l (0 -0.404 -0.05)
  Marker L.Knee.Medial: socket_parent_frame_connectee_name=/bodyset/femur_l (0 -0.404 0.05)
  Marker L.Knee.Med: socket_parent_frame_connectee_name=/bodyset/femur_l (0 -0.404 0.05)
  Marker L.MKnee: socket_parent_frame_connectee_name=/bodyset/femur_l (0 -0.404 0.05)
  Marker L.Mkn: socket_parent_frame_connectee_name=/bodyset/femur_l (0 -0.404 0.05)
  Marker L.Thigh: socket_parent_frame_connectee_name=/bodyset/femur_l (0.0179 -0.224 -0.1147)
  Marker L.Thigh.Superior: socket_parent_frame_connectee_name=/bodyset/femur_l (0.0179 -0.224 -0.1147)
  Marker L.Thigh.Inferior: socket_parent_frame_connectee_name=/bodyset/femur_l (0.0179 -0.224 -0.1147)
  Marker L.Thigh.Lateral: socket_parent_frame_connectee_name=/bodyset/femur_l (0.0179 -0.224 -0.1147)
  Marker L.Thigh.Upper: socket_parent_frame_connectee_name=/bodyset/femur_l (0.0179 -0.264 -0.0647)
  Marker L.Thigh.Front: socket_parent_frame_connectee_name=/bodyset/femur_l (0.08 -0.324 -0.0047)
  Marker L.Thigh.Medial.Inferior: socket_parent_frame_connectee_name=/bodyset/femur_l (0.08 -0.324 -0.0047)
  Marker L.Thigh.Rear: socket_parent_frame_connectee_name=/bodyset/femur_l (-0.0479 -0.324 -0.0047)
  Marker L.Thigh.Lateral.Inferior: socket_parent_frame_connectee_name=/bodyset/femur_l (0.0179 -0.264 -0.0647)
  Marker LTHI: socket_parent_frame_connectee_name=/bodyset/femur_l (0.0179 -0.264 -0.0647)
  Marker L.TH1: socket_parent_frame_connectee_name=/bodyset/femur_l (0.0179 -0.224 -0.1147)
  Marker L.TH2: socket_parent_frame_connectee_name=/bodyset/femur_l (0.0179 -0.224 -0.1147)
  Marker L.TH3: socket_parent_frame_connectee_name=/bodyset/femur_l (0.0179 -0.264 -0.0647)
  Marker L.TH4: socket_parent_frame_connectee_name=/bodyset/femur_l (0.08 -0.324 -0.0047)
  Marker LHJC: socket_parent_frame_connectee_name=/bodyset/femur_l (0 0 0)
  Marker L_HJC: socket_parent_frame_connectee_name=/bodyset/femur_l (0 0 0)
  Marker LAnkleCenter: socket_parent_frame_connectee_name=/bodyset/tibia_l (-0.005 -0.385 0)
  Marker L.Ankle: socket_parent_frame_connectee_name=/bodyset/tibia_l (-0.005 -0.385 -0.053)
  Marker L.Ankle.Lateral: socket_parent_frame_connectee_name=/bodyset/tibia_l (-0.005 -0.385 -0.053)
  Marker L.Ankle.Lat: socket_parent_frame_connectee_name=/bodyset/tibia_l (-0.005 -0.385 -0.053)
  Marker LANK: socket_parent_frame_connectee_name=/bodyset/tibia_l (-0.005 -0.385 -0.053)
  Marker L.Ankle.Medial: socket_parent_frame_connectee_name=/bodyset/tibia_l (0.006 -0.385 0.038)
  Marker L.Ankle.Med: socket_parent_frame_connectee_name=/bodyset/tibia_l (0.006 -0.385 0.038)
  Marker L.Shank: socket_parent_frame_connectee_name=/bodyset/tibia_l (0.0104 -0.2322 -0.0748)
  Marker L.Leg.Superior: socket_parent_frame_connectee_name=/bodyset/tibia_l (0.0425 -0.3596 0)
  Marker L.Shank.Upper: socket_parent_frame_connectee_name=/bodyset/tibia_l (0.0125 -0.3196 -0.06)
  Marker L.Shank.Superior: socket_parent_frame_connectee_name=/bodyset/tibia_l (0.0125 -0.3196 -0.06)
  Marker L.Shank.Inferior: socket_parent_frame_connectee_name=/bodyset/tibia_l (0.0125 -0.3196 -0.06)
  Marker L.Shank.Lateral: socket_parent_frame_connectee_name=/bodyset/tibia_l (0.0125 -0.3196 -0.06)
  Marker L.Leg.Lateral.Inferior: socket_parent_frame_connectee_name=/bodyset/tibia_l (0.0125 -0.3196 -0.06)
  Marker L.TibTub: socket_parent_frame_connectee_name=/bodyset/tibia_l (0.05 -0.06 -0.01)
  Marker L.Shank.Front: socket_parent_frame_connectee_name=/bodyset/tibia_l (0.0425 -0.3596 0)
  Marker L.Shank.Rear: socket_parent_frame_connectee_name=/bodyset/tibia_l (-0.0325 -0.3596 0)
  Marker L.Leg.Medial.Inferior: socket_parent_frame_connectee_name=/bodyset/tibia_l (0.0125 -0.3196 -0.06)
  Marker LTIB: socket_parent_frame_connectee_name=/bodyset/tibia_l (0.0125 -0.3196 -0.06)
  Marker L.MAnkle: socket_parent_frame_connectee_name=/bodyset/tibia_l (0.006 -0.3888 0.038)
  Marker L.Man: socket_parent_frame_connectee_name=/bodyset/tibia_l (0.006 -0.3888 0.038)
  Marker L.SH1: socket_parent_frame_connectee_name=/bodyset/tibia_l (0.0104 -0.2322 -0.0748)
  Marker L.SH2: socket_parent_frame_connectee_name=/bodyset/tibia_l (0.0425 -0.3596 0)
  Marker L.SH3: socket_parent_frame_connectee_name=/bodyset/tibia_l (0.0125 -0.3196 -0.06)
  Marker L.SH4: socket_parent_frame_connectee_name=/bodyset/tibia_l (0.0125 -0.3196 -0.06)
  Marker L.Patella: socket_parent_frame_connectee_name=/bodyset/patella_l (0.02 0.02 0)
  Marker L.Toe: socket_parent_frame_connectee_name=/bodyset/calcn_l (0.19 0.018 0)
  Marker L.ToeMedial: socket_parent_frame_connectee_name=/bodyset/calcn_l (0.19 0.018 0)
  Marker L.ToeLateral: socket_parent_frame_connectee_name=/bodyset/calcn_l (0.19 0.018 0)
  Marker LTOE: socket_parent_frame_connectee_name=/bodyset/calcn_l (0.19 0.018 0)
  Marker L.Midfoot.Medial: socket_parent_frame_connectee_name=/bodyset/calcn_l (0.11 0.018 0.04)
  Marker L.Midfoot.Lateral: socket_parent_frame_connectee_name=/bodyset/calcn_l (0.11 0.018 -0.04)
  Marker L.Midfoot.Superior: socket_parent_frame_connectee_name=/bodyset/calcn_l (0.11 0.018 0)
  Marker L.MedFoot: socket_parent_frame_connectee_name=/bodyset/calcn_l (0.11 0.018 0.04)
  Marker L.Methead1: socket_parent_frame_connectee_name=/bodyset/calcn_l (0.2 0.005 0.045)
  Marker L.LatFoot: socket_parent_frame_connectee_name=/bodyset/calcn_l (0.11 0.018 0.04)
  Marker L.Methead5: socket_parent_frame_connectee_name=/bodyset/calcn_l (0.15 0.005 -0.055)
  Marker L.Heel: socket_parent_frame_connectee_name=/bodyset/calcn_l (-0.03 0.018 0.01)
  Marker L.Hindfoot: socket_parent_frame_connectee_name=/bodyset/calcn_l (-0.03 0.018 0.01)
  Marker LHEE: socket_parent_frame_connectee_name=/bodyset/calcn_l (-0.03 0.018 0.01)
  Marker L.MT1: socket_parent_frame_connectee_name=/bodyset/calcn_l (0.2 0.005 0.045)
  Marker L.MTO: socket_parent_frame_connectee_name=/bodyset/calcn_l (0.2 0.005 0.045)
  Marker L.MT0: socket_parent_frame_connectee_name=/bodyset/calcn_l (0.2 0.005 0.045)
  Marker L.MT5: socket_parent_frame_connectee_name=/bodyset/calcn_l (0.15 0.005 -0.055)
