# OpenSim document version 40000
ForsimTool:
  model_file: ../../../models/lenhart2015/lenhart2015.osim
  external_loads_file: ./anterior_laxity_external_loads.xml
  prescribed_coordinates_file: ./anterior_laxity_prescribed_kinematics.sto
  results_directory: ../results/forsim
  results_file_basename: anterior_laxity
  start_time: -1
  stop_time: 0.05
  integrator_accuracy: 0.00001
  report_time_step: 0.01
  minimum_time_step: -1
  maximum_time_step: 0.01
  constant_muscle_frc: 0.02
  unconstrained_coordinates: /jointset/knee_r/knee_add_r /jointset/knee_r/knee_rot_r /jointset/knee_r/knee_tx_r /jointset/knee_r/knee_ty_r /jointset/knee_r/knee_tz_r /jointset/pf_r/pf_flex_r /jointset/pf_r/pf_rot_r /jointset/pf_r/pf_tilt_r /jointset/pf_r/pf_tx_r /jointset/pf_r/pf_ty_r /jointset/pf_r/pf_tz_r
  use_visualizer: true
  verbose: 0
  AnalysisSet Analyses:
    ForceReporter: start_time=-Inf end_time=Inf step_interval=1 in_degrees=true include_constraint_forces=false
    StatesReporter: start_time=-Inf end_time=Inf step_interval=1 in_degrees=true
