# OpenSim document version 40000
Model lenhart2015:
  gravity: 0 -9.80665 0
  length_units: m
  force_units: N
  credits:
    Colin Smith. This model contains the femur and tibia bodies from the Lenhart 2015 model to be used to demonstrate the ability to visualize joint kinematics. The bone surface representing the subchondral bone was manually selected and copied into seperate .stl files to enable distance mapping. This model is only intended as an example and should not be used for simulations or research purposes.
  publications:
    Lenhart, R. L., Kaiser, J., Smith, C. R., & Thelen, D. G. (2015). Prediction and validation of load-dependent behavior of the tibiofemoral and patellofemoral joints during movement. Annals of biomedical engineering, 43(11), 2675-2685.
  Smith2018ContactMesh femurMesh: socket_parent_frame=/bodyset/femur_distal_r
      socket_scale_frame=/bodyset/femur_distal_r file_name=lenhart2015-R-femur-subchonral-bone.stl
    PhysicalOffsetFrame mesh_frame: socket_parent=/bodyset/femur_distal_r translation=(0 0 0) [meters]
  Smith2018ContactMesh tibiaMesh: socket_parent_frame=/bodyset/tibia_proximal_r
      socket_scale_frame=/bodyset/femur_distal_r file_name=lenhart2015-R-tibia-subchondral-bone.stl
    PhysicalOffsetFrame mesh_frame: socket_parent=/bodyset/tibia_proximal_r translation=(0 0 0)
  Ground
  BodySet:
    Body femur_distal_r: mass=0.01 [kg] mass_center=(0 0 0) inertia=(0.001 0.001 0.001 0 0 0)
        meshes=(lenhart2015-R-femur-bone.stl lenhart2015-R-femur-cartilage.stl)
      WrapCylinder Capsule_r: xyz_body_rotation=(-0.0299066 0.02 0.331613) translation=(-0.004 -0.003 0) quadrant=all
          radius=0.018 length=0.5
    Body tibia_proximal_r: mass=0.01 mass_center=(0 0 0) inertia=(0.001 0.001 0.001 0 0 0)
        meshes=(lenhart2015-R-tibia-bone.stl lenhart2015-R-tibia-cartilage.stl lenhart2015-R-fibula-bone.stl)
      WrapEllipsoid Med_Lig_r: xyz_body_rotation=(-0.104907 -0.0349066 0.181613) translation=(0.001 -0.0346 -0.0187)
          quadrant=all dimensions=(0.03 0.018 0.012)
      WrapEllipsoid Med_LigP_r: xyz_body_rotation=(-0.139813 0.349066 0.181613) translation=(-0.0104 -0.0314 -0.0227)
          quadrant=all dimensions=(0.025 0.0054 0.0053)
  JointSet:
    CustomJoint ground_femur_distal_r: socket_parent_frame=/ground socket_child_frame=/bodyset/pelvis
      Coordinate pelvis_tilt: default_value=0 range=(-4.712389 4.712389) clamped=false
      Coordinate pelvis_list: default_value=0 range=(-4.712389 4.712389) clamped=false
      Coordinate pelvis_rot: default_value=0 range=(-4.712389 4.712389) clamped=false
      Coordinate pelvis_tx: default_value=0 range=(-10 10) clamped=false
      Coordinate pelvis_ty: default_value=0.969 range=(-10 10) clamped=false
      Coordinate pelvis_tz: default_value=0 range=(-10 10) clamped=false
      SpatialTransform:
        TransformAxis rotation1: coordinates=pelvis_tilt axis=(0 0 1) LinearFunction(coefficients=1 0)
        TransformAxis rotation2: coordinates=pelvis_list axis=(1 0 0) LinearFunction(coefficients=1 0)
        TransformAxis rotation3: coordinates=pelvis_rot axis=(0 1 0) LinearFunction(coefficients=1 0)
        TransformAxis translation1: coordinates=pelvis_tx axis=(1 0 0) LinearFunction(coefficients=1 0)
        TransformAxis translation2: coordinates=pelvis_ty axis=(0 1 0) LinearFunction(coefficients=1 0)
        TransformAxis translation3: coordinates=pelvis_tz axis=(0 0 1) LinearFunction(coefficients=1 0)
    CustomJoint knee_r: socket_parent_frame=/bodyset/femur_distal_r socket_child_frame=/bodyset/tibia_proximal_r
      Coordinate knee_flex_r: default_value=0 range=(-0.1745329 2.792527) clamped=true
      Coordinate knee_add_r: default_value=0 range=(-0.8726646 0.8726646) clamped=true
      Coordinate knee_rot_r: default_value=0 range=(-0.8726646 0.8726646) clamped=true
      Coordinate knee_tx_r: default_value=0 range=(-0.2 0.2) clamped=true
      Coordinate knee_ty_r: default_value=0 range=(-0.2 0.2) clamped=true
      Coordinate knee_tz_r: default_value=0 range=(-0.2 0.2) clamped=true
      SpatialTransform:
        TransformAxis rotation1: coordinates=knee_flex_r axis=(0 0 1) LinearFunction(coefficients=-1 0)
        TransformAxis rotation2: coordinates=knee_add_r axis=(1 0 0) LinearFunction(coefficients=1 0)
        TransformAxis rotation3: coordinates=knee_rot_r axis=(0 1 0) LinearFunction(coefficients=1 0)
        TransformAxis translation1: coordinates=knee_tx_r axis=(1 0 0) LinearFunction(coefficients=1 0)
        TransformAxis translation2: coordinates=knee_ty_r axis=(0 1 0) LinearFunction(coefficients=1 0)
        TransformAxis translation3: coordinates=knee_tz_r axis=(0 0 1) LinearFunction(coefficients=1 0)
  ForceSet:
    Blankevoort1991Ligament MCLs1: linear_stiffness=6913.739 slack_length=0.0723198
      PathPoint P1: femur_distal_r (0.0053709 0.0083394 -0.04065)
      PathPoint P2: tibia_proximal_r (0.014323 -0.061131 -0.015466)
      PathWrap pathwrap_: wrap_object=Med_Lig_r method=hybrid
    Blankevoort1991Ligament MCLs2: linear_stiffness=5568.041 slack_length=0.0897982
      PathPoint P1: femur_distal_r (0.0056326 0.015275 -0.040595)
      PathPoint P2: tibia_proximal_r (0.019234 -0.071438 -0.010942)
      PathWrap pathwrap_: wrap_object=Med_Lig_r method=hybrid
    Blankevoort1991Ligament MCLs3: linear_stiffness=7006.988 slack_length=0.0713573
      PathPoint P1: femur_distal_r (-0.00040512 0.016541 -0.038878)
      PathPoint P2: tibia_proximal_r (0.0011834 -0.05547 -0.021542)
      PathWrap pathwrap_: wrap_object=Med_Lig_r method=hybrid
    Blankevoort1991Ligament MCLs4: linear_stiffness=6077.608 slack_length=0.0822692
      PathPoint P1: femur_distal_r (-0.0011507 0.0080931 -0.039482)
      PathPoint P2: tibia_proximal_r (0.0065168 -0.074829 -0.017341)
      PathWrap pathwrap_: wrap_object=Med_Lig_r method=hybrid
    Blankevoort1991Ligament MCLs5: linear_stiffness=6398.968 slack_length=0.0781376
      PathPoint P1: femur_distal_r (0.0025007 0.011534 -0.040624)
      PathPoint P2: tibia_proximal_r (0.011919 -0.065762 -0.016444)
      PathWrap pathwrap_: wrap_object=Med_Lig_r method=hybrid
    Blankevoort1991Ligament MCLs6: linear_stiffness=6746.86 slack_length=0.0741086
      PathPoint P1: femur_distal_r (0.00092052 0.013423 -0.040266)
      PathPoint P2: tibia_proximal_r (0.0071679 -0.06075 -0.019481)
      PathWrap pathwrap_: wrap_object=Med_Lig_r method=hybrid
    Smith2018ArticularContactForce TF_contact: socket_target_mesh=/femurMesh socket_casting_mesh=/tibiaMesh
        min_proximity=-0.01 max_proximity=0.01 verbose=0
      ContactParameters target_mesh_contact_params: elastic_modulus=1 poissons_ratio=1 thickness=0.005
      ContactParameters casting_mesh_contact_params: elastic_modulus=1 poissons_ratio=1 thickness=0.005
