# OpenSim document version 40000
ScaleTool lenhart2015:
  mass: 62 [kg]
  height: -1
  age: -1
  GenericModelMaker:
    model_file: ../../models/lenhart2015/lenhart2015.osim
    marker_set_file: ../../models/lenhart2015/lenhart2015_markers.xml
  ModelScaler:
    apply: true
    scaling_order: measurements
    marker_file: ../../models/lenhart2015/motion_data/static1.trc
    time_range: 1 1.1
    preserve_mass_distribution: true
    output_model_file: ./results/scale/lenhart2015_scaled.osim
    output_scale_file: ./results/scale/scale_factors.xml
    MeasurementSet:
      Measurement pelvis_x: apply=true
        MarkerPair: markers=(R.ASIS L.ASIS)
        MarkerPair: markers=(R.PSIS L.PSIS)
        BodyScale pelvis: axes=X
      Measurement pelvis_y: apply=true
        MarkerPair: markers=(R.ASIS R.Knee)
        MarkerPair: markers=(L.ASIS L.Knee)
        MarkerPair: markers=(R.ASIS L.ASIS)
        MarkerPair: markers=(R.PSIS L.PSIS)
        BodyScale pelvis: axes=Y
      Measurement pelvis_z: apply=true
        MarkerPair: markers=(R.ASIS L.ASIS)
        MarkerPair: markers=(R.PSIS L.PSIS)
        BodyScale pelvis: axes=Z
      Measurement femur_r: apply=true
        MarkerPair: markers=(R.ASIS R.Knee)
        MarkerPair: markers=(L.ASIS L.Knee)
        BodyScale femur_r: axes=(X Y Z)
      Measurement femur_distal_r: apply=false
        MarkerPair: markers=(R.ASIS R.Knee)
        MarkerPair: markers=(L.ASIS L.Knee)
        BodyScale femur_distal_r: axes=(X Y Z)
      Measurement patella_r: apply=false
        MarkerPair: markers=(R.ASIS R.Knee)
        MarkerPair: markers=(L.ASIS L.Knee)
        BodyScale patella_r: axes=(X Y Z)
      Measurement tibia_proximal_r: apply=false
        MarkerPair: markers=(R.ASIS R.Knee)
        MarkerPair: markers=(L.ASIS L.Knee)
        BodyScale tibia_proximal_r: axes=(X Y Z)
      Measurement tibia_r: apply=true
        MarkerPair: markers=(R.Knee R.Ankle)
        MarkerPair: markers=(L.Knee L.Ankle)
        BodyScale tibia_r: axes=(X Y Z)
      Measurement talus_r: apply=true
        MarkerPair: markers=(R.Knee R.Ankle)
        MarkerPair: markers=(L.Knee L.Ankle)
        BodyScale talus_r: axes=(X Y Z)
      Measurement calcn_r: apply=true
        MarkerPair: markers=(R.Knee R.Ankle)
        MarkerPair: markers=(L.Knee L.Ankle)
        BodyScale calcn_r: axes=(X Y Z)
      Measurement toes_r: apply=true
        MarkerPair: markers=(R.Knee R.Ankle)
        MarkerPair: markers=(L.Knee L.Ankle)
        BodyScale toes_r: axes=(X Y Z)
      Measurement neckhead: apply=true
        MarkerPair: markers=(R.PSIS R.Shoulder)
        MarkerPair: markers=(L.PSIS L.Shoulder)
        BodyScale neckhead: axes=(X Y Z)
      Measurement torso_x: apply=true
        MarkerPair: markers=(R.ASIS L.Shoulder)
        MarkerPair: markers=(R.ASIS R.Shoulder)
        MarkerPair: markers=(R.Shoulder L.Shoulder)
        BodyScale torso: axes=X
      Measurement torso_y: apply=true
        MarkerPair: markers=(R.PSIS R.Shoulder)
        MarkerPair: markers=(L.PSIS L.Shoulder)
        BodyScale torso: axes=Y
      Measurement torso_z: apply=true
        MarkerPair: markers=(R.ASIS L.Shoulder)
        MarkerPair: markers=(L.ASIS R.Shoulder)
        MarkerPair: markers=(R.Shoulder L.Shoulder)
        BodyScale torso: axes=Z
      Measurement humerus_r: apply=true
        MarkerPair: markers=(R.Shoulder R.Elbow)
        MarkerPair: markers=(L.Shoulder L.Elbow)
        BodyScale humerus_r: axes=(X Y Z)
      Measurement humerus_l: apply=true
        MarkerPair: markers=(R.Shoulder R.Elbow)
        MarkerPair: markers=(L.Shoulder L.Elbow)
        BodyScale humerus_l: axes=(X Y Z)
      Measurement ulna_r: apply=true
        MarkerPair: markers=(R.Elbow R.Wrist)
        MarkerPair: markers=(L.Elbow L.Wrist)
        BodyScale ulna_r: axes=(X Y Z)
      Measurement ulna_l: apply=true
        MarkerPair: markers=(R.Elbow R.Wrist)
        MarkerPair: markers=(L.Elbow L.Wrist)
        BodyScale ulna_l: axes=(X Y Z)
      Measurement radius_r: apply=true
        MarkerPair: markers=(R.Elbow R.Wrist)
        MarkerPair: markers=(L.Elbow L.Wrist)
        BodyScale radius_r: axes=(X Y Z)
      Measurement raduis_l: apply=true
        MarkerPair: markers=(R.Elbow R.Wrist)
        MarkerPair: markers=(L.Elbow L.Wrist)
        BodyScale radius_l: axes=(X Y Z)
      Measurement hand_r: apply=true
        MarkerPair: markers=(R.Elbow R.Wrist)
        MarkerPair: markers=(L.Elbow L.Wrist)
        BodyScale hand_r: axes=(X Y Z)
      Measurement hand_l: apply=true
        MarkerPair: markers=(R.Elbow R.Wrist)
        MarkerPair: markers=(L.Elbow L.Wrist)
        BodyScale hand_l: axes=(X Y Z)
      Measurement femur_l: apply=true
        MarkerPair: markers=(R.ASIS R.Knee)
        MarkerPair: markers=(L.ASIS L.Knee)
        BodyScale femur_l: axes=(X Y Z)
      Measurement patella_l: apply=true
        MarkerPair: markers=(R.ASIS R.Knee)
        MarkerPair: markers=(L.ASIS L.Knee)
        BodyScale patella_l: axes=(X Y Z)
      Measurement tibia_l: apply=true
        MarkerPair: markers=(R.Knee R.Ankle)
        MarkerPair: markers=(L.Knee L.Ankle)
        BodyScale tibia_l: axes=(X Y Z)
      Measurement talus_l: apply=true
        MarkerPair: markers=(R.Knee R.Ankle)
        MarkerPair: markers=(L.Knee L.Ankle)
        BodyScale talus_l: axes=(X Y Z)
      Measurement calcn_l: apply=true
        MarkerPair: markers=(R.Knee R.Ankle)
        MarkerPair: markers=(L.Knee L.Ankle)
        BodyScale calcn_l: axes=(X Y Z)
      Measurement toes_l: apply=true
        MarkerPair: markers=(R.Knee R.Ankle)
        MarkerPair: markers=(L.Knee L.Ankle)
        BodyScale toes_l: axes=(X Y Z)
  MarkerPlacer:
    apply: true
    marker_file: ../../models/lenhart2015/motion_data/static1.trc
    time_range: 1 1.1
    output_motion_file: ./results/scale/static1.mot
    output_model_file: ./results/scale/lenhart2015_scaled_markers.osim
    max_marker_movement: -1
    IKTaskSet:
      IKMarkerTask R_HJC: apply=true weight=0
      IKMarkerTask L_HJC: apply=true weight=0
      IKMarkerTask S2: apply=true weight=10
      IKMarkerTask R.PSIS: apply=true weight=10
      IKMarkerTask L.PSIS: apply=true weight=10
      IKMarkerTask R.ASIS: apply=true weight=10
      IKMarkerTask L.ASIS: apply=true weight=10
      IKMarkerTask R.Clavicle: apply=true weight=1
      IKMarkerTask L.Clavicle: apply=true weight=1
      IKMarkerTask R.Shoulder: apply=true weight=5
      IKMarkerTask L.Shoulder: apply=true weight=5
      IKMarkerTask R.Bicep: apply=true weight=1
      IKMarkerTask R.Elbow: apply=true weight=1
      IKMarkerTask R.Forearm: apply=true weight=1
      IKMarkerTask R.Wrist: apply=true weight=1
      IKMarkerTask L.Bicep: apply=true weight=1
      IKMarkerTask L.Elbow: apply=true weight=1
      IKMarkerTask L.Forearm: apply=true weight=1
      IKMarkerTask L.Wrist: apply=true weight=1
      IKMarkerTask R.Knee: apply=true weight=10
      IKMarkerTask R.TH1: apply=true weight=0
      IKMarkerTask R.TH2: apply=true weight=0
      IKMarkerTask R.TH3: apply=true weight=0
      IKMarkerTask R.Ankle: apply=true weight=10
      IKMarkerTask R.SH1: apply=true weight=0
      IKMarkerTask R.SH2: apply=true weight=0
      IKMarkerTask R.SH3: apply=true weight=0
      IKMarkerTask R.SH4: apply=true weight=0
      IKMarkerTask R.MT5: apply=true weight=5
      IKMarkerTask R.Heel: apply=true weight=10
      IKMarkerTask L.Knee: apply=true weight=10
      IKMarkerTask L.TH1: apply=true weight=0
      IKMarkerTask L.TH2: apply=true weight=0
      IKMarkerTask L.TH3: apply=true weight=0
      IKMarkerTask L.TH4: apply=true weight=0
      IKMarkerTask L.Ankle: apply=true weight=10
      IKMarkerTask L.SH1: apply=true weight=0
      IKMarkerTask L.SH2: apply=true weight=0
      IKMarkerTask L.SH3: apply=true weight=0
      IKMarkerTask L.Heel: apply=true weight=10
      IKMarkerTask L.MT5: apply=true weight=5
      IKCoordinateTask [values shared by the 11 below unless stated]: apply=true weight=100 value_type=default_value
          value=0
      IKCoordinateTask pf_flex_r
      IKCoordinateTask pf_rot_r
      IKCoordinateTask pf_tilt_r
      IKCoordinateTask pf_tx_r
      IKCoordinateTask pf_ty_r
      IKCoordinateTask pf_tz_r
      IKCoordinateTask knee_add_r
      IKCoordinateTask knee_rot_r
      IKCoordinateTask knee_tx_r
      IKCoordinateTask knee_ty_r
      IKCoordinateTask knee_tz_r
