# OpenSim document version 40000
MarkerSet:
  Marker R_HJC: femur_r (0 0 0) fixed=true
  Marker L_HJC: femur_l (0 0 0) fixed=true
  Marker S2: pelvis (-0.16 0.02 0)
  Marker R.PSIS: pelvis (-0.16 0.03 0.04)
  Marker L.PSIS: pelvis (-0.16 0.03 -0.04)
  Marker R.ASIS: pelvis (0.03 0 0.12)
  Marker L.ASIS: pelvis (0.03 0 -0.12)
  Marker R.Clavicle: torso (0.035 0.45 0.025)
  Marker L.Clavicle: torso (0.035 0.45 -0.025)
  Marker R.Shoulder: torso (-0.03 0.48 0.19)
  Marker L.Shoulder: torso (-0.03 0.48 -0.19)
  Marker R.Bicep: humerus_r (0.04 -0.15 0)
  Marker R.Elbow: humerus_r (0.02 -0.275 0.05)
  Marker R.Forearm: ulna_r (0 -0.15 0)
  Marker R.Wrist: radius_r (-0.03214248 -0.2216111 0.009427368)
  Marker L.Bicep: humerus_l (0.04 -0.15 0)
  Marker L.Elbow: humerus_l (0.02 -0.275 -0.05)
  Marker L.Forearm: ulna_l (0 -0.15 0)
  Marker L.Wrist: radius_l (-0.0321425 -0.221611 -0.00942737)
  Marker R.Knee: femur_r (0 -0.4 0.06)
  Marker R.TH1: femur_r (0.0179 -0.224 0.1147)
  Marker R.TH2: femur_r (0.0179 -0.264 0.0647)
  Marker R.TH3: femur_r (0.0179 -0.264 0.0647)
  Marker R.Ankle: tibia_r (-0.005 -0.39 0.053)
  Marker R.SH1: tibia_r (0.0104 -0.2322 0.0748)
  Marker R.SH2: tibia_r (0.0125 -0.3196 0.06)
  Marker R.SH3: tibia_r (0.0125 -0.3196 0.06)
  Marker R.SH4: tibia_r (0.0125 -0.3196 0.06)
  Marker R.MT5: calcn_r (0.185 0.001502071 0.06864782)
  Marker R.Heel: calcn_r (-0.025 0.018 -0.01) fixed=true
  Marker L.Knee: femur_l (0 -0.4 -0.06) fixed=true
  Marker L.TH1: femur_l (0.0179 -0.224 -0.1147)
  Marker L.TH2: femur_l (0.0179 -0.224 -0.1147)
  Marker L.TH3: femur_l (0.0179 -0.264 -0.0647)
  Marker L.TH4: femur_l (0.08 -0.324 -0.0047)
  Marker L.Ankle: tibia_l (-0.005 -0.39 -0.053)
  Marker L.SH1: tibia_l (0.0104 -0.2322 -0.0748)
  Marker L.SH2: tibia_l (0.0425 -0.3596 0)
  Marker L.SH3: tibia_l (0.0125 -0.3196 -0.06)
  Marker L.Heel: calcn_l (-0.025 0.018 0.01) fixed=true
  Marker L.MT5: calcn_l (0.185 0.00150207 -0.0686478)
