# OpenSim document version 40000
ExternalLoads:
  datafile: C:\Users\csmith\github\wisco_opensim\source\exp_data\silder\YA\y9\Y9_100_1_grf.mot
  lowpass_cutoff_frequency_for_load_kinematics: -1
  ExternalForce FP1: applied_to_body=calcn_l force_expressed_in_body=ground point_expressed_in_body=ground
      force_identifier=ground_force_1_v point_identifier=ground_force_1_p torque_identifier=ground_torque_1_
  ExternalForce FP2: applied_to_body=calcn_r force_expressed_in_body=ground point_expressed_in_body=ground
      force_identifier=ground_force_2_v point_identifier=ground_force_2_p torque_identifier=ground_torque_2_
  ExternalForce FP3: applied_to_body=calcn_l force_expressed_in_body=ground point_expressed_in_body=ground
      force_identifier=ground_force_3_v point_identifier=ground_force_3_p torque_identifier=ground_torque_3_
