# OpenSim document version 40000
Model cams_Mplus_right:
  Ground
  BodySet:
    Body femur_distal_r: mass=5 [kg] mass_center=(0 0 0) inertia=(0.01 0.01 0.01 0 0 0)
        meshes=femur_implant_Mplus_JWI_meters_reduce.stl
    Body tibia_proximal_r: mass=5 mass_center=(0 0 0) inertia=(0.01 0.01 0.01 0 0 0)
        meshes=(tibia_implant_JWI_meters.stl tibia_inlay_JWI_meters.stl)
  JointSet:
    CustomJoint gnd_femur: socket_parent_frame=/ground socket_child_frame=/bodyset/femur_distal_r
      Coordinate ground_femur_flex_r
      Coordinate ground_femur_add_r
      Coordinate ground_femur_rot_r
      Coordinate ground_femur_lat_r
      Coordinate ground_femur_ant_r
      Coordinate ground_femur_sup_r
      SpatialTransform:
        TransformAxis rotation1: coordinates=ground_femur_flex_r axis=(1 0 0) LinearFunction(coefficients=1 0)
        TransformAxis rotation2: coordinates=ground_femur_add_r axis=(0 1 0) LinearFunction(coefficients=1 0)
        TransformAxis rotation3: coordinates=ground_femur_rot_r axis=(0 0 1) LinearFunction(coefficients=1 0)
        TransformAxis translation1: coordinates=ground_femur_lat_r axis=(1 0 0) LinearFunction(coefficients=1 0)
        TransformAxis translation2: coordinates=ground_femur_ant_r axis=(0 1 0) LinearFunction(coefficients=1 0)
        TransformAxis translation3: coordinates=ground_femur_sup_r axis=(0 0 1) LinearFunction(coefficients=1 0)
    CustomJoint knee_r: socket_parent_frame=/bodyset/femur_distal_r socket_child_frame=/bodyset/tibia_proximal_r
      Coordinate knee_flex_r: default_value=0
      Coordinate knee_add_r: default_value=0
      Coordinate knee_rot_r: default_value=0
      Coordinate knee_lat_r: default_value=0
      Coordinate knee_ant_r: default_value=0.008
      Coordinate knee_sup_r: default_value=-0.02
      SpatialTransform:
        TransformAxis rotation1: coordinates=knee_flex_r axis=(1 0 0) LinearFunction(coefficients=-1 0)
        TransformAxis rotation2: coordinates=knee_add_r axis=(0 1 0) LinearFunction(coefficients=1 0)
        TransformAxis rotation3: coordinates=knee_rot_r axis=(0 0 1) LinearFunction(coefficients=1 0)
        TransformAxis translation1: coordinates=knee_lat_r axis=(1 0 0) LinearFunction(coefficients=1 0)
        TransformAxis translation2: coordinates=knee_ant_r axis=(0 1 0) LinearFunction(coefficients=1 0)
        TransformAxis translation3: coordinates=knee_sup_r axis=(0 0 1) LinearFunction(coefficients=1 0)
  ForceSet:
    Blankevoort1991Ligament [values shared by the 6 below unless stated]: linear_stiffness=500 [N]
        slack_length=0.02 [m]
    Blankevoort1991Ligament MCL1:
      PathPoint P1: femur_distal_r (-0.04 -0.01 0)
      PathPoint P2: tibia_proximal_r (-0.04 -0.02 -0.01)
    Blankevoort1991Ligament MCL2:
      PathPoint P1: femur_distal_r (-0.04 0 0)
      PathPoint P2: tibia_proximal_r (-0.04 -0.01 -0.01)
    Blankevoort1991Ligament MCL3:
      PathPoint P1: femur_distal_r (-0.04 0.01 0)
      PathPoint P2: tibia_proximal_r (-0.04 0 -0.01)
    Blankevoort1991Ligament LCL1:
      PathPoint P1: femur_distal_r (0.04 -0.01 0)
      PathPoint P2: tibia_proximal_r (0.04 -0.02 -0.01)
    Blankevoort1991Ligament LCL2:
      PathPoint P1: femur_distal_r (0.04 0 0)
      PathPoint P2: tibia_proximal_r (0.04 -0.01 -0.01)
    Blankevoort1991Ligament LCL3:
      PathPoint P1: femur_distal_r (0.04 0.01 0)
      PathPoint P2: tibia_proximal_r (0.04 0 -0.01)
    Smith2018ArticularContactForce tf_contact: socket_target_mesh=/contactgeometryset/femur_component
        socket_casting_mesh=/contactgeometryset/tibia_inlay min_proximity=0 max_proximity=0.02
        elastic_foundation_formulation=linear use_lumped_contact_model=true
      # Combine the thickness and the average material properties between the Smith2018ContactMeshes for both meshes and use Bei & Fregly 2003 lumped parameter Elastic Foundation model.
    SpringGeneralizedForce knee_flex_r: coordinate=knee_flex_r stiffness=0 rest_length=0 viscosity=0.1
    SpringGeneralizedForce knee_add_r: coordinate=knee_add_r stiffness=0 rest_length=0 viscosity=5
    SpringGeneralizedForce knee_rot_r: coordinate=knee_rot_r stiffness=0 rest_length=0 viscosity=5
    SpringGeneralizedForce knee_lat_r: coordinate=knee_lat_r stiffness=0 rest_length=0 viscosity=200
    SpringGeneralizedForce knee_sup_r: coordinate=knee_sup_r stiffness=0 rest_length=0 viscosity=200
    SpringGeneralizedForce knee_ant_r: coordinate=knee_ant_r stiffness=0 rest_length=0 viscosity=200
  ContactGeometrySet:
    Smith2018ContactMesh femur_component: socket_frame=/bodyset/femur_distal_r location=(0 0 0)
        socket_scale_frame=/ground mesh_file=femur_implant_Mplus_JWI_contact.stl elastic_modulus=463000000
        poissons_ratio=0.45 thickness=0.003 use_variable_thickness=false min_thickness=0.001 [m] max_thickness=0.01 [m]
        scale_factors=(1 1 1)
    Smith2018ContactMesh tibia_inlay: socket_frame=/bodyset/tibia_proximal_r location=(0 0 0)
        socket_scale_frame=/ground mesh_file=tibia_inlay_JWI_contact.stl elastic_modulus=463000000 poissons_ratio=0.45
        thickness=0.003 use_variable_thickness=false min_thickness=0.001 max_thickness=0.01 scale_factors=(1 1 1)
