# OpenSim document version 40000
COMAKInverseKinematicsTool:
  model_file: ../../../models/lenhart2015/lenhart2015.osim
  results_directory: ../results/comak-inverse-kinematics
  results_prefix: walking
  perform_secondary_constraint_sim: true
  secondary_coordinates: /jointset/knee_r/knee_add_r /jointset/knee_r/knee_rot_r /jointset/knee_r/knee_tx_r /jointset/knee_r/knee_ty_r /jointset/knee_r/knee_tz_r /jointset/pf_r/pf_flex_r /jointset/pf_r/pf_rot_r /jointset/pf_r/pf_tilt_r /jointset/pf_r/pf_tx_r /jointset/pf_r/pf_ty_r /jointset/pf_r/pf_tz_r
  secondary_coupled_coordinate: /jointset/knee_r/knee_flex_r
  secondary_constraint_sim_settle_threshold: 1e-4
  secondary_constraint_sim_sweep_time: 3
  secondary_coupled_coordinate_start_value: 0 [meters]
  secondary_coupled_coordinate_stop_value: 110 [meters]
  secondary_constraint_sim_integrator_accuracy: 1e-6
  secondary_constraint_sim_internal_step_limit: 10000
  secondary_constraint_function_file: ../results/comak-inverse-kinematics/secondary_coordinate_constraint_functions.xml
  constraint_function_num_interpolation_points: 20
  print_secondary_constraint_sim_results: true
  constrained_model_file: ../results/comak-inverse-kinematics/ik_constrained_model.osim
  perform_inverse_kinematics: true
  marker_file: ../../../models/lenhart2015/motion_data/overground_17.trc
  output_motion_file: overground_17_ik.mot
  time_range: 0 2.36
  report_errors: true
  report_marker_locations: false
  ik_constraint_weight: Inf
  ik_accuracy: 1e-5
  use_visualizer: true
  verbose: 1
  IKTaskSet:
    IKMarkerTask R_HJC: apply=true weight=0
    IKMarkerTask L_HJC: apply=true weight=0
    IKMarkerTask S2: apply=true weight=10
    IKMarkerTask R.ASIS: apply=true weight=10
    IKMarkerTask R.PSIS: apply=true weight=10
    IKMarkerTask L.ASIS: apply=true weight=10
    IKMarkerTask L.PSIS: apply=true weight=10
    IKMarkerTask R.Clavicle: apply=true weight=1
    IKMarkerTask L.Clavicle: apply=true weight=1
    IKMarkerTask R.Scapula: apply=true weight=1
    IKMarkerTask L.Scapula: apply=true weight=1
    IKMarkerTask R.Shoulder: apply=true weight=1
    IKMarkerTask L.Shoulder: apply=true weight=1
    IKMarkerTask R.Bicep: apply=true weight=1
    IKMarkerTask R.Elbow: apply=true weight=1
    IKMarkerTask R.Forearm: apply=true weight=1
    IKMarkerTask R.Wrist: apply=true weight=1
    IKMarkerTask L.Bicep: apply=true weight=1
    IKMarkerTask L.Elbow: apply=true weight=1
    IKMarkerTask L.Forearm: apply=true weight=1
    IKMarkerTask L.Wrist: apply=true weight=1
    IKMarkerTask R.Knee: apply=true weight=10
    IKMarkerTask R.TH1: apply=true weight=5
    IKMarkerTask R.TH2: apply=true weight=5
    IKMarkerTask R.TH3: apply=true weight=5
    IKMarkerTask R.TH4: apply=true weight=5
    IKMarkerTask R.Ankle: apply=true weight=10
    IKMarkerTask R.SH1: apply=true weight=5
    IKMarkerTask R.SH2: apply=true weight=5
    IKMarkerTask R.SH3: apply=true weight=5
    IKMarkerTask R.SH4: apply=true weight=5
    IKMarkerTask R.MT5: apply=true weight=5
    IKMarkerTask R.Heel: apply=true weight=5
    IKMarkerTask L.Knee: apply=true weight=10
    IKMarkerTask L.TH1: apply=true weight=5
    IKMarkerTask L.TH2: apply=true weight=5
    IKMarkerTask L.TH3: apply=true weight=5
    IKMarkerTask L.TH4: apply=true weight=5
    IKMarkerTask L.Ankle: apply=true weight=10
    IKMarkerTask L.SH1: apply=true weight=5
    IKMarkerTask L.SH2: apply=true weight=5
    IKMarkerTask L.SH3: apply=true weight=5
    IKMarkerTask L.SH4: apply=true weight=5
    IKMarkerTask L.Heel: apply=true weight=5
    IKMarkerTask L.MT1: apply=true weight=5
    IKMarkerTask L.MT5: apply=true weight=5
