# OpenSim document version 40000
COMAKTool:
  model_file: ../results/scale/lenhart2015_scaled_markers.osim
  ik_motion_file: ../results/comak-inverse-kinematics/overground_17_ik.mot
  external_loads_file: ../../../models/lenhart2015/motion_data/overground_17_ext_loads.xml
  results_dir: ../results/comak/
  results_prefix: walking
  use_visualizer: true
  print_input_kinematics: true
  verbose: 0
  start_time: 1.21
  stop_time: 2.32
  time_step: 0.01
  lowpass_filter_frequency: 6
  prescribed_coordinates: /jointset/gnd_pelvis/pelvis_tx /jointset/gnd_pelvis/pelvis_ty /jointset/gnd_pelvis/pelvis_tz /jointset/gnd_pelvis/pelvis_tilt /jointset/gnd_pelvis/pelvis_list /jointset/gnd_pelvis/pelvis_rot /jointset/subtalar_r/subt_angle_r /jointset/mtp_r/mtp_angle_r /jointset/hip_l/hip_flex_l /jointset/hip_l/hip_add_l /jointset/hip_l/hip_rot_l /jointset/pf_l/pf_l_r3 /jointset/pf_l/pf_l_tx /jointset/pf_l/pf_l_ty /jointset/knee_l/knee_flex_l /jointset/ankle_l/ankle_flex_l /jointset/subtalar_l/subt_angle_l /jointset/mtp_l/mtp_angle_l /jointset/pelvis_torso/lumbar_ext /jointset/pelvis_torso/lumbar_latbend /jointset/pelvis_torso/lumbar_rot /jointset/torso_neckhead/neck_ext /jointset/torso_neckhead/neck_latbend /jointset/torso_neckhead/neck_rot /jointset/acromial_r/arm_add_r /jointset/acromial_r/arm_flex_r /jointset/acromial_r/arm_rot_r /jointset/elbow_r/elbow_flex_r /jointset/radioulnar_r/pro_sup_r /jointset/radius_hand_r/wrist_flex_r /jointset/acromial_l/arm_add_l /jointset/acromial_l/arm_flex_l /jointset/acromial_l/arm_rot_l /jointset/elbow_l/elbow_flex_l /jointset/radioulnar_l/pro_sup_l /jointset/radius_hand_l/wrist_flex_l
  primary_coordinates: /jointset/hip_r/hip_flex_r /jointset/hip_r/hip_add_r /jointset/hip_r/hip_rot_r /jointset/knee_r/knee_flex_r /jointset/ankle_r/ankle_flex_r
  secondary_coordinates: /jointset/knee_r/knee_tz_r /jointset/knee_r/knee_tx_r /jointset/knee_r/knee_ty_r /jointset/knee_r/knee_add_r /jointset/knee_r/knee_rot_r /jointset/pf_r/pf_tz_r /jointset/pf_r/pf_tx_r /jointset/pf_r/pf_ty_r /jointset/pf_r/pf_flex_r /jointset/pf_r/pf_rot_r /jointset/pf_r/pf_tilt_r
  replace_force_set: false
  force_set_file: ../../../models/lenhart2015/lenhart2015_reserve_actuators.xml
  max_iterations: 25
  max_change_rotation: 0.05
  max_change_translation: 0.005
  udot_tolerance: 1
  udot_worse_case_tolerance: 50
  unit_udot_epsilon: 0.0000000005
  comak_damping_multiplier: 1
  contact_energy_weight: 500
  primary_reserve_actuator_strength: -1
  secondary_reserve_actuator_strength: -1
  equilibriate_secondary_coordinates_at_start: true
  settle_threshold: 0.0001
  settle_accuracy: 1e-5
  settle_sim_results_prefix: walking
  settle_sim_results_dir: ../results/comak
  print_settle_sim_results: true
  settle_sim_viscosity_multiplier: 1
  COMAKSecondaryCoordinateSet secondary_coordinate_set:
    COMAKSecondaryCoordinate knee_add_r: coordinate=/jointset/knee_r/knee_add_r comak_damping=5 max_change=0.005
    COMAKSecondaryCoordinate knee_rot_r: coordinate=/jointset/knee_r/knee_rot_r comak_damping=5 max_change=0.005
    COMAKSecondaryCoordinate knee_tx_r: coordinate=/jointset/knee_r/knee_tx_r comak_damping=200 max_change=0.005
    COMAKSecondaryCoordinate knee_ty_r: coordinate=/jointset/knee_r/knee_ty_r comak_damping=200 max_change=0.005
    COMAKSecondaryCoordinate knee_tz_r: coordinate=/jointset/knee_r/knee_tz_r comak_damping=200 max_change=0.005
    COMAKSecondaryCoordinate pf_flex_r: coordinate=/jointset/pf_r/pf_flex_r comak_damping=0.1 max_change=0.005
    COMAKSecondaryCoordinate pf_rot_r: coordinate=/jointset/pf_r/pf_rot_r comak_damping=2 max_change=0.005
    COMAKSecondaryCoordinate pf_tilt_r: coordinate=/jointset/pf_r/pf_tilt_r comak_damping=2 max_change=0.005
    COMAKSecondaryCoordinate pf_tx_r: coordinate=/jointset/pf_r/pf_tx_r comak_damping=30 max_change=0.005
    COMAKSecondaryCoordinate pf_ty_r: coordinate=/jointset/pf_r/pf_ty_r comak_damping=30 max_change=0.005
    COMAKSecondaryCoordinate pf_tz_r: coordinate=/jointset/pf_r/pf_tz_r comak_damping=30 max_change=0.005
  COMAKCostFunctionParameterSet:
    COMAKCostFunctionParameter gasmed_r: actuator=/forceset/gasmed_r weight=Constant(value=4)
        desired_activation=Constant(value=0)
    COMAKCostFunctionParameter gaslat_r: actuator=/forceset/gaslat_r weight=Constant(value=7)
        desired_activation=Constant(value=0)
    COMAKCostFunctionParameter soleus_r: actuator=/forceset/soleus_r weight=Constant(value=0.9)
        desired_activation=Constant(value=0)
    COMAKCostFunctionParameter recfem_r: actuator=/forceset/recfem_r weight=Constant(value=3)
        desired_activation=Constant(value=0)
    COMAKCostFunctionParameter glmed1_r: actuator=/forceset/glmed1_r weight=Constant(value=0.9)
        desired_activation=Constant(value=0)
    COMAKCostFunctionParameter glmed2_r: actuator=/forceset/glmed2_r weight=Constant(value=0.9)
        desired_activation=Constant(value=0)
    COMAKCostFunctionParameter glmed3_r: actuator=/forceset/glmed3_r weight=Constant(value=0.9)
        desired_activation=Constant(value=0)
    COMAKCostFunctionParameter glmin1_r: actuator=/forceset/glmin1_r weight=Constant(value=0.9)
        desired_activation=Constant(value=0)
    COMAKCostFunctionParameter glmin2_r: actuator=/forceset/glmin2_r weight=Constant(value=0.9)
        desired_activation=Constant(value=0)
    COMAKCostFunctionParameter glmin3_r: actuator=/forceset/glmin3_r weight=Constant(value=0.9)
        desired_activation=Constant(value=0)
    COMAKCostFunctionParameter bflh_r: actuator=/forceset/"bflh_r weight=Constant(value=2)
        desired_activation=Constant(value=0)
    COMAKCostFunctionParameter bfsh_r: actuator=/forceset/bfsh_r weight=Constant(value=2)
        desired_activation=Constant(value=0)
    COMAKCostFunctionParameter semiten_r: actuator=/forceset/semiten_r weight=Constant(value=2)
        desired_activation=Constant(value=0)
    COMAKCostFunctionParameter semimem_r: actuator=/forceset/semimem_r weight=Constant(value=2)
        desired_activation=Constant(value=0)
